# Worksheet setting: ORIGIN = 1
# Flash isotermico
nc := 3
lbmol := 454 mol
Ru := 1.987*BTU/lbmol
Falim := 100*lbmol/hr
z := [0.3; 0.2; 0.5]
Pflash := 1 atm
Pc := [714.2; 587.8; 530]*psi
transpose(Pc) = [714.2, 587.8, 530] psi
Ac := [5.658375, 5307.813, 379.456; 5.944251, 5836.287, 374.745; 5.922098, 6141.641, 354.0417]
b := [
    16.39282, 0.0402, 6.93e-6, -4.11e-8, 2.4e-11;
    21.17722, 0.0464, 9.96e-6, -4.63e-8, 2.59e-11;
    27.89247, 0.051, 5.91e-6, -3.66e-8, 1.95e-11
]
Psat(T) :=
    for i ∈ 1 .. nc
        Psat[i] ← Pc[i]*e^(Ac[i, 1] - Ac[i, 2]/(Ac[i, 3] + T))
    Psat
Psat(150) = [9.06578; 3.31514; 1.01024] psi
Keq(T, P) := Psat(T)/Pflash
# Ecuación de Rachford- Rice
f(T, P, ψ) := sum((z[i]*(1 - Keq(T, P)[i]))/(1 + ψ*(Keq(T, P)[i] - 1)), i = 1 .. nc)
# Calcúlo la temperatura de liquido saturado TF de alimento
T := 100
Given
f(T, Pflash, 0) == 0
TF := Find(T) = 225.658
# Calcúlo la temperatura de rocio
T := 100
Given
f(T, Pflash, 1) == 0
Trocio := Find(T) = 262.225
Tflash := (TF + Trocio)/2 = 243.942
ψ := 0.5
Given
f(Tflash, Pflash, ψ) == 0
ψflash := Find(ψ) = 0.426062
x(T, P) :=
    for i ∈ 1 .. nc
        x[i] ← z[i]/(ψflash*(Keq(T, P)[i] - 1) + 1)
    x
x(Tflash, Pflash) = [0.170015; 0.182785; 0.6472]
V := ψflash*Falim = 42.6062 lbmol/hr
L := Falim - V = 57.3938 lbmol/hr
y :=
    for i ∈ 1 .. nc
        y[i] ← x(Tflash, Pflash)[i]*Keq(Tflash, Pflash)[i]
    y
y = [0.475099; 0.22319; 0.301711]
Tref := TF
Cp(T) :=
    for i ∈ 1 .. nc
        Cp[i] ← sum((b[i, k]*T^(k - 1))*BTU/lbmol, k = 1 .. 5)
    Cp
λ(T) :=
    for i ∈ 1 .. nc
        λ[i] ← (Ac[i, 2]*Ru*(T + 459.67)^2)/(Ac[i, 3] + T)^2
    λ
hv :=
    for i ∈ 1 .. nc
        hv[i] ← λ(Tref)[i] + integral(Cp(T)[i], T = Tref .. Tflash)
    hv
Cp(Tflash) = [26.1; 32.5084; 40.2229] BTU/lbmol
HV := sum(y[i]*hv[i], i = 1 .. nc) = 15519.5 BTU/lbmol
hl :=
    for i ∈ 1 .. nc
        hl[i] ← hv[i] - λ(Tflash)[i]
    hl
hl = [563.601; 697.364; 887.661] BTU/lbmol
HL := sum(x(Tflash, Pflash)[i]*hl[i], i = 1 .. nc) = 797.783 BTU/lbmol
Q := V*HV + L*HL = 207.206 kW
